*Heading
** Job name: JOB62 Model name: MODEL_62
** Generated by: Abaqus/CAE 2021
*Preprint, echo=NO, model=NO, history=NO, contact=NO
**
** PARTS
**
*Part, name=ROD
*End Part
**
**
** ASSEMBLY
**
*Assembly, name=Assembly
**
*Instance, name=ROD, part=ROD
*Node
      1,          2.5,   14.1583128
      2,           0.,   14.1583128
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*Element, type=CAX4R
  1,   1,  10, 511,  85
  2,  10,  11, 512, 511
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*Node
   4900,           0.,          23.,           0.
*Nset, nset=ROD-RefPt_, internal
4900,
*Nset, nset=LOADING_POINT
 4900,
*Nset, nset=BOTTOM_EDGE
   5,   7, 211, 212, 213, 214
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*Elset, elset=BOTTOM_EDGE, generate
 3147,  3168,     1
*Nset, nset=COUPLE_EDGE
   8,   9, 423, 424, 425, 426
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*Elset, elset=COUPLE_EDGE, generate
 4643,  4664,     1
*Nset, nset=BOTTOM_EDGE_VERTICE
 7,
*Nset, nset=ALL_FACES, generate
    1,  4899,     1
*Elset, elset=ALL_FACES, generate
    1,  4664,     1
** Section: P91
*Solid Section, elset=ALL_FACES, material=P91
,
*End Instance
**
*Surface, type=NODE, name=ROD_COUPLE_EDGE_CNS_, internal
ROD.COUPLE_EDGE, 1.
** Constraint: KIN_COUPLE
*Coupling, constraint name=KIN_COUPLE, ref node=ROD.LOADING_POINT, surface=ROD_COUPLE_EDGE_CNS_
*Kinematic
*End Assembly
*Amplitude, name=AMPLITUDE, time=TOTAL TIME
             0.,              0.,              1.,              1.
**
** MATERIALS
**
*Material, name=P91
*Density
 7.8e-06,
*Elastic
207011., 0.3
*Plastic
 403.713,          0.
 407.457, 8.19176e-05
 410.274, 0.000168309
 413.091,   0.0002547
 415.908, 0.000341091
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 1801.31,     1.99105
*Porous Metal Plasticity, relative density=0.998589
1.56000487221529, 0.971283,   1.8709
*Void Nucleation
 0.354138,  0.154161, 0.0846386
**
** BOUNDARY CONDITIONS
**
** Name: CONSTRAIN_LOADING Type: Displacement/Rotation
*Boundary
ROD.LOADING_POINT, 1, 1
ROD.LOADING_POINT, 2, 2
ROD.LOADING_POINT, 6, 6
** Name: X_SYM Type: Displacement/Rotation
*Boundary
ROD.BOTTOM_EDGE, 2, 2
** ----------------------------------------------------------------
**
** STEP: DISPLACEMENT
**
*Step, name=DISPLACEMENT, nlgeom=YES
*Dynamic, Explicit
, 1.
*Bulk Viscosity
0.06, 1.2
** Mass Scaling: Semi-Automatic
**               Whole Model
*Fixed Mass Scaling, dt=1e-05, type=below min, factor=10.
**
** BOUNDARY CONDITIONS
**
** Name: DISPLACEMENT Type: Displacement/Rotation
*Boundary, amplitude=AMPLITUDE
ROD.LOADING_POINT, 1, 1
ROD.LOADING_POINT, 2, 2, 2.61
ROD.LOADING_POINT, 6, 6
**
** OUTPUT REQUESTS
**
*Restart, write, number interval=1, time marks=NO
**
** FIELD OUTPUT: F-Output-1
**
*Output, field
*Node Output
COORD, RF, U
*Element Output, directions=YES
LE, PEEQ, S
**
** HISTORY OUTPUT: ENERGY
**
*Output, history, frequency=5
*Energy Output, elset=ROD.ALL_FACES
ALLIE, ALLKE
**
** HISTORY OUTPUT: LE22
**
*Element Output, elset=ROD.BOTTOM_EDGE
LE22,
**
** HISTORY OUTPUT: PEEQ
**
*Element Output, elset=ROD.BOTTOM_EDGE
PEEQ,
**
** HISTORY OUTPUT: RF
**
*Node Output, nset=ROD.BOTTOM_EDGE
RF2,
**
** HISTORY OUTPUT: S22
**
*Element Output, elset=ROD.BOTTOM_EDGE
S22,
**
** HISTORY OUTPUT: UX
**
*Node Output, nset=ROD.BOTTOM_EDGE_VERTICE
U1,
**
** HISTORY OUTPUT: UY
**
*Node Output, nset=ROD.LOADING_POINT
U2,
*End Step
